OpenVSP model (file version 4), 11 components.
Geometry view with OpenVSP parameter names; values to 6 digits, angles in degrees, lengths in the model's unit.

Box "Battery 5000 mAh"
  location (X Y Z) 13.8095 0 0, rotation 0 0 0
  bounding box size 14.73 5.46 4.32
  mass: Density=2.3255 Shell_Flag=0 Mass_Area=1 Mass_Prior=0
  Design: Height=4.32 Length=14.73 SquareFlag=0 Width=5.46
  custom script Box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

Box "Camera + Gimbal"
  location (X Y Z) 30.4762 0 0, rotation 0 0 0
  bounding box size 11.6 6.5 2.06
  mass: Density=1.9 Shell_Flag=0 Mass_Area=1 Mass_Prior=0
  Design: Height=2.06 Length=11.6 SquareFlag=0 Width=6.5
  custom script Box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

Box "Ardupilot"
  location (X Y Z) 48.8095 0 1.90476, rotation 0 0 0
  bounding box size 7 4.5 1.5
  mass: Density=0.59 Shell_Flag=0 Mass_Area=1 Mass_Prior=0
  Design: Height=1.5 Length=7 SquareFlag=0 Width=4.5
  custom script Box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

Box "GPS module"
  location (X Y Z) 57.381 0 5.38095, rotation 0 0 0
  bounding box size 3.8 3.8 0.85
  mass: Density=1.3687 Shell_Flag=0 Mass_Area=1 Mass_Prior=0
  Design: Height=0.85 Length=3.8 SquareFlag=0 Width=3.8
  custom script Box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

Box "Marcopolo"
  location (X Y Z) 61.1905 0 3, rotation 0 0 0
  bounding box size 6.4 2.24 1.27
  mass: Density=0.659 Shell_Flag=0 Mass_Area=1 Mass_Prior=0
  Design: Height=1.27 Length=6.4 SquareFlag=0 Width=2.24
  custom script Box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

Box "Speed Controller"
  location (X Y Z) 63.8095 0 1.66667, rotation 0 0 0
  bounding box size 5.5 1.9 1
  Design: Height=1 Length=5.5 SquareFlag=0 Width=1.9
  custom script Box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

Box "Telemetry"
  location (X Y Z) 51.6667 0 -0.238095, rotation 0 0 0
  bounding box size 5.55 2.67 1.33
  Design: Height=1.33 Length=5.55 SquareFlag=0 Width=2.67
  custom script Box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

Fuselage "Fuselage"
  location (X Y Z) 0 0 0, rotation 0 0 0
  bounding box size 80 10 10
  Design: Length=80
  cross sections:
    n  XLocPercent  YLocPercent  ZLocPercent  shape
    0  0            0            0            ellipse Ellipse_Height=1.45454 Ellipse_Width=2.63636
    1  0.111413     0            0            rounded rectangle RoundRectXSec_Radius=3 RoundedRect_Height=10 RoundedRect_Width=10
    2  0.5          0            0            as above
    3  0.75         0            0            as above
    4  1            0            0.043478     rounded rectangle RoundRectXSec_Radius=0 RoundedRect_Height=2.59091 RoundedRect_Width=1.5

Wing "Wing"
  location (X Y Z) 30.2381 0 5, rotation 0 0 0
  symmetric about XZ
  bounding box size 11 80 1.27699
  totals: TotalSpan=80 TotalProjectedSpan=80 TotalChord=11 TotalArea=880
  root: chord 11, twist 0, NACA 4-series Camber=0 CamberLoc=0.2 ThickChord=0.1
  sections:
    n  Span  Root_Chord  Tip_Chord  Area  Sweep  Sweep_Location  Dihedral  Twist  Twist_Location  tip airfoil
    1  40    11          11         440   0      0               0         0      0               as above

Wing "Hstab"
  location (X Y Z) 71.9048 0 3.09524, rotation 0 0 0
  symmetric about XZ
  bounding box size 6 25.1667 0.696538
  totals: TotalSpan=25.1667 TotalProjectedSpan=25.1667 TotalChord=6 TotalArea=151
  root: chord 6, twist 0, NACA 4-series Camber=0 CamberLoc=0.2 ThickChord=0.1
  sections:
    n  Span     Root_Chord  Tip_Chord  Area  Sweep  Sweep_Location  Dihedral  Twist  Twist_Location  tip airfoil
    1  12.5833  6           6          75.5  0      0               0         0      0.25            as above

Wing "Vstab"
  location (X Y Z) 71.6667 0 3.80952, rotation 90 0 0
  symmetric about XZ
  bounding box size 7.83158 0.909165 8.16667
  totals: TotalSpan=16.3333 TotalProjectedSpan=16.3333 TotalChord=6 TotalArea=98
  root: chord 7.83158, twist 0, NACA 4-series Camber=0 CamberLoc=0.2 ThickChord=0.1
  sections:
    n  Span     Root_Chord  Tip_Chord  Area  Sweep  Sweep_Location  Dihedral  Twist  Twist_Location  tip airfoil
    1  8.16667  7.83158     4.16842    49    10     0               0         0      0.25            as above
