brick
  0.0530
 0 0 0
  0.5162  0.2716  1.9010
  0.5195  0.0000  0.0253
  0.0000

SURFACE
WING
 18.0000  1.0000 30.0000 -2.0000
ANGLE
  0.0000
COMPONENT
 2
YDUPLICATE
 0
SECTION
  0.4341  0.0000  0.0762  0.2716  0.0000  0.0000  0.0000
AFIL
SD7062_avl.dat
SECTION
  0.4341  0.5692  0.0762  0.2716  0.0000  0.0000  0.0000
AFIL
SD7062_avl.dat
CONTROL
aileron  1.0000  0.7500  0.0000  1.0000  0.0000 -1.0000
SECTION
  0.4341  0.9030  0.0762  0.2716  0.0000  0.0000  0.0000
AFIL
SD7062_avl.dat
CONTROL
aileron  1.0000  0.7500  0.0000  1.0000  0.0000 -1.0000
SECTION
  0.4341  0.9505  0.0762  0.2716  0.0000  0.0000  0.0000
AFIL
SD7062_avl.dat


SURFACE
WING2
 18.0000  1.0000 30.0000 -2.0000
ANGLE
  0.0000
COMPONENT
 2
YDUPLICATE
 0
SECTION
  1.2128  0.0000  0.0238  0.1435 -0.0102  0.0000  0.0000
AFIL
NACA0006_avl.dat
CONTROL
elevator  1.0000  0.7922  0.0000  1.0000  0.0000  1.0000
SECTION
  1.2128  0.3349  0.0238  0.1435 -0.0102  0.0000  0.0000
AFIL
NACA0006_avl.dat
CONTROL
elevator  1.0000  0.7922  0.0000  1.0000  0.0000  1.0000


SURFACE
WING3
 18.0000  1.0000 30.0000  1.0000
ANGLE
  0.0000
COMPONENT
 1
SECTION
  1.2113  0.0000  0.0238  0.1498  0.0000  0.0000  0.0000
AFIL
NACA0006_avl.dat
CONTROL
rudder  1.0000  0.7500  0.0000  0.0000  1.0000  1.0000
SECTION
  1.2412  0.0000  0.2485  0.1198  0.0000  0.0000  0.0000
AFIL
NACA0006_avl.dat
CONTROL
rudder  1.0000  0.7500  0.0000  0.0000  1.0000  1.0000
