brick
  0.0541
 0 0 0
  0.7750  0.3327  2.3292
  0.3920  0.0000  0.0000
  0.0000

SURFACE
WING
 18.0000  1.0000 30.0000 -2.0000
ANGLE
  0.0000
COMPONENT
 2
SECTION
  0.3043  0.0000  0.0000  0.3327  0.0000  0.0000  0.0000
AFIL
Eppler_560.dat
SECTION
  0.3043  1.1646  0.0000  0.3327  0.0000  0.0000  0.0000
AFIL
Eppler_560.dat

SURFACE
WING2
 18.0000  1.0000 30.0000  2.0000
ANGLE
  0.0000
COMPONENT
 2
SECTION
  0.3043 -1.1646  0.0000  0.3327  0.0000  0.0000  0.0000
AFIL
Eppler_560.dat
SECTION
  0.3043  0.0000  0.0000  0.3327  0.0000  0.0000  0.0000
AFIL
Eppler_560.dat

SURFACE
WING3
 18.0000  1.0000 30.0000 -2.0000
ANGLE
  0.0000
COMPONENT
 2
SECTION
  1.1407  0.0000  0.0000  0.1864 -0.5585  0.0000  0.0000
AFIL
NACA0006.dat
SECTION
  1.1407  0.4349  0.0000  0.1864 -0.5585  0.0000  0.0000
AFIL
NACA0006.dat

SURFACE
WING4
 18.0000  1.0000 30.0000  2.0000
ANGLE
  0.0000
COMPONENT
 2
SECTION
  1.1407 -0.4349  0.0000  0.1864 -0.5585  0.0000  0.0000
AFIL
NACA0006.dat
SECTION
  1.1407  0.0000  0.0000  0.1864 -0.5585  0.0000  0.0000
AFIL
NACA0006.dat
